M := transpose([
    10.6, 10.9, 15.2, 17.3, 18.2, 16.1, 13.2, 17.1, 22.3, 21.4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])
# [plot: i vs Mi]
n := length(M) = 50
i := 0 .. 9
x1 := sort(M)
R := max(x1) - min(x1) = 13.1
k := floor(sqrt(n)) = 7
d := R/k = 1.87143
m1 := 10
m2 := 6
m3 := 7
m4 := 8
m5 := 13
m6 := 1
m7 := 5
p1 := m1/n = 0.2
p2 := m2/n = 0.12
p3 := m3/n = 0.14
p4 := m4/n = 0.16
p5 := m5/n = 0.26
p6 := m6/n = 0.02
p7 := m7/n = 0.1
p9 := [0.2, 0.12, 0.14, 0.16, 0.26, 0.2, 0.1]
z1 := p1 = 0.2
z2 := p1 + p2 = 0.32
z3 := p1 + p2 + p3 = 0.46
z4 := p1 + p2 + p3 + p4 = 0.62
z5 := p1 + p2 + p3 + p4 + p5 = 0.88
z6 := p1 + p2 + p3 + p4 + p5 + p6 = 0.9
z7 := p1 + p2 + p3 + p4 + p5 + p6 + p7 = 1
f1 := p1/d = 0.10687
f2 := p2/d = 0.0641221
f3 := p3/d = 0.0748092
f4 := p4/d = 0.0854962
f5 := p5/d = 0.138931
f6 := p6/n = 0.0004
f7 := p7/d = 0.0534351
a := [11.535, 13.407, 15.278, 17.149, 19.02, 20.89, 22.761]
x := sum(a*p_i, i = 1 .. л)  # error: Эта переменная не определена. Проверьте правильность установки обозначения.
